<?xml version="1.0" encoding="UTF-8"?>
<networkml xmlns="http://morphml.org/networkml/schema" xmlns:meta="http://morphml.org/metadata/schema" xmlns:xsi="http://www.w3.org/2001/XMLSchema-instance" xsi:schemaLocation="http://morphml.org/networkml/schema  http://www.neuroml.org/NeuroMLValidator/NeuroMLFiles/Schemata/v1.8.1/Level3/NetworkML_v1.8.1.xsd" lengthUnits="micrometer">

<meta:notes>

Network structure (NeuroML 1.x) for project: PN1RS saved with neuroConstruct v1.6.0 on: 16:50:13, 17-Oct-15

Cell Group: neuron_PN1_RS_sk_638603 contains 1 cells

</meta:notes>

<meta:properties>
    <meta:property tag="neuroConstruct_random_seed" value="-9223372036854775808"/>

    <meta:property tag="neuroConstruct_sim_config" value="Default Simulation Configuration"/>

    <meta:property tag="neuroConstruct_sim_duration" value="100.0"/>

    <meta:property tag="neuroConstruct_sim_time_step" value="0.025"/>

    <meta:property tag="neuroConstruct_temperature" value="6.3"/>
</meta:properties>

        <populations>
    <population name="neuron_PN1_RS_sk_638603" cell_type="neuron_PN1_RS_sk_638603">
        <meta:properties>

        </meta:properties>
        <instances size="1">
            <instance id="0">
                <location x="0.0" y="0.0" z="0.0"/>
            </instance>
        </instances>
    </population>
</populations>

            <!--There are no synaptic connections present in the network-->

        <inputs units="Physiological Units">
    <input name="398576">
        <random_stim frequency="0.02" synaptic_mechanism="DoubExpSynA"/>
        <target population="neuron_PN1_RS_sk_638603">
            <sites size="29">
                <site cell_id="0" segment_id="7796" fraction_along="0.5"/>
                <site cell_id="0" segment_id="2611" fraction_along="0.5"/>
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            </sites>
        </target>
    </input>
    <input name="395984">
        <random_stim frequency="0.02" synaptic_mechanism="DoubExpSynA"/>
        <target population="neuron_PN1_RS_sk_638603">
            <sites size="4">
                <site cell_id="0" segment_id="17519" fraction_along="0.5"/>
                <site cell_id="0" segment_id="10760" fraction_along="0.5"/>
                <site cell_id="0" segment_id="13224" fraction_along="0.5"/>
                <site cell_id="0" segment_id="3038" fraction_along="0.5"/>
            </sites>
        </target>
    </input>
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</inputs>

</networkml>
