<?xml version="1.0" encoding="UTF-8"?>
<neuroml xmlns="http://www.neuroml.org/schema/neuroml2" xmlns:xsi="http://www.w3.org/2001/XMLSchema-instance" xsi:schemaLocation="http://www.neuroml.org/schema/neuroml2  https://raw.githubusercontent.com/NeuroML/NeuroML2/development/Schemas/NeuroML2/NeuroML_v2beta4.xsd" id="network_PN2RS">

    <notes>

Network structure (NeuroML 2beta4) for project: PN2RS saved with neuroConstruct v1.7.1 on: 15:46:06, 12-Nov-15

Cell Group: neuron_PN2_RS_sk_480245 contains 1 cells

    </notes>

    <include href="DoubExpSynA.synapse.nml"/>
    <include href="LeakConductance.channel.nml"/>
    <include href="neuron_PN2_RS_sk_480245.cell.nml"/>
    <poissonFiringSynapse id="398576" averageRate="20.0 per_s" synapse="DoubExpSynA" spikeTarget="./DoubExpSynA"/>

    <poissonFiringSynapse id="395984" averageRate="20.0 per_s" synapse="DoubExpSynA" spikeTarget="./DoubExpSynA"/>

    <poissonFiringSynapse id="321092" averageRate="20.0 per_s" synapse="DoubExpSynA" spikeTarget="./DoubExpSynA"/>

    <poissonFiringSynapse id="538882" averageRate="20.0 per_s" synapse="DoubExpSynA" spikeTarget="./DoubExpSynA"/>

    <poissonFiringSynapse id="403794" averageRate="20.0 per_s" synapse="DoubExpSynA" spikeTarget="./DoubExpSynA"/>

    <poissonFiringSynapse id="333916" averageRate="20.0 per_s" synapse="DoubExpSynA" spikeTarget="./DoubExpSynA"/>

    <poissonFiringSynapse id="339573" averageRate="20.0 per_s" synapse="DoubExpSynA" spikeTarget="./DoubExpSynA"/>

    <poissonFiringSynapse id="225960" averageRate="20.0 per_s" synapse="DoubExpSynA" spikeTarget="./DoubExpSynA"/>

    <poissonFiringSynapse id="319492" averageRate="20.0 per_s" synapse="DoubExpSynA" spikeTarget="./DoubExpSynA"/>

    <poissonFiringSynapse id="153798" averageRate="20.0 per_s" synapse="DoubExpSynA" spikeTarget="./DoubExpSynA"/>

    <poissonFiringSynapse id="265283" averageRate="20.0 per_s" synapse="DoubExpSynA" spikeTarget="./DoubExpSynA"/>

    <poissonFiringSynapse id="360361" averageRate="20.0 per_s" synapse="DoubExpSynA" spikeTarget="./DoubExpSynA"/>

    <poissonFiringSynapse id="320688" averageRate="20.0 per_s" synapse="DoubExpSynA" spikeTarget="./DoubExpSynA"/>

    <poissonFiringSynapse id="402811" averageRate="20.0 per_s" synapse="DoubExpSynA" spikeTarget="./DoubExpSynA"/>

    <poissonFiringSynapse id="360235" averageRate="20.0 per_s" synapse="DoubExpSynA" spikeTarget="./DoubExpSynA"/>

    <poissonFiringSynapse id="445335" averageRate="20.0 per_s" synapse="DoubExpSynA" spikeTarget="./DoubExpSynA"/>

    <poissonFiringSynapse id="362999" averageRate="20.0 per_s" synapse="DoubExpSynA" spikeTarget="./DoubExpSynA"/>

    <poissonFiringSynapse id="309595" averageRate="20.0 per_s" synapse="DoubExpSynA" spikeTarget="./DoubExpSynA"/>

    <poissonFiringSynapse id="331430" averageRate="20.0 per_s" synapse="DoubExpSynA" spikeTarget="./DoubExpSynA"/>

    <poissonFiringSynapse id="329095" averageRate="20.0 per_s" synapse="DoubExpSynA" spikeTarget="./DoubExpSynA"/>

    <poissonFiringSynapse id="343030" averageRate="20.0 per_s" synapse="DoubExpSynA" spikeTarget="./DoubExpSynA"/>

    <poissonFiringSynapse id="220151" averageRate="20.0 per_s" synapse="DoubExpSynA" spikeTarget="./DoubExpSynA"/>

    <poissonFiringSynapse id="392106" averageRate="20.0 per_s" synapse="DoubExpSynA" spikeTarget="./DoubExpSynA"/>

    <poissonFiringSynapse id="332797" averageRate="20.0 per_s" synapse="DoubExpSynA" spikeTarget="./DoubExpSynA"/>

    <poissonFiringSynapse id="396156" averageRate="20.0 per_s" synapse="DoubExpSynA" spikeTarget="./DoubExpSynA"/>

    <poissonFiringSynapse id="596799" averageRate="20.0 per_s" synapse="DoubExpSynA" spikeTarget="./DoubExpSynA"/>

    <poissonFiringSynapse id="401986" averageRate="20.0 per_s" synapse="DoubExpSynA" spikeTarget="./DoubExpSynA"/>

    <poissonFiringSynapse id="333138" averageRate="20.0 per_s" synapse="DoubExpSynA" spikeTarget="./DoubExpSynA"/>

    <poissonFiringSynapse id="337765" averageRate="20.0 per_s" synapse="DoubExpSynA" spikeTarget="./DoubExpSynA"/>

    <poissonFiringSynapse id="373935" averageRate="20.0 per_s" synapse="DoubExpSynA" spikeTarget="./DoubExpSynA"/>

    <poissonFiringSynapse id="379686" averageRate="20.0 per_s" synapse="DoubExpSynA" spikeTarget="./DoubExpSynA"/>

    <poissonFiringSynapse id="379044" averageRate="20.0 per_s" synapse="DoubExpSynA" spikeTarget="./DoubExpSynA"/>

    <poissonFiringSynapse id="499879" averageRate="20.0 per_s" synapse="DoubExpSynA" spikeTarget="./DoubExpSynA"/>

    <poissonFiringSynapse id="362954" averageRate="20.0 per_s" synapse="DoubExpSynA" spikeTarget="./DoubExpSynA"/>

    <poissonFiringSynapse id="373736" averageRate="20.0 per_s" synapse="DoubExpSynA" spikeTarget="./DoubExpSynA"/>

    <poissonFiringSynapse id="404952" averageRate="20.0 per_s" synapse="DoubExpSynA" spikeTarget="./DoubExpSynA"/>

    <poissonFiringSynapse id="328875" averageRate="20.0 per_s" synapse="DoubExpSynA" spikeTarget="./DoubExpSynA"/>

    <poissonFiringSynapse id="362982" averageRate="20.0 per_s" synapse="DoubExpSynA" spikeTarget="./DoubExpSynA"/>

    <poissonFiringSynapse id="366040" averageRate="20.0 per_s" synapse="DoubExpSynA" spikeTarget="./DoubExpSynA"/>

    <poissonFiringSynapse id="420141" averageRate="20.0 per_s" synapse="DoubExpSynA" spikeTarget="./DoubExpSynA"/>

    <poissonFiringSynapse id="327347" averageRate="20.0 per_s" synapse="DoubExpSynA" spikeTarget="./DoubExpSynA"/>

    <poissonFiringSynapse id="492811" averageRate="20.0 per_s" synapse="DoubExpSynA" spikeTarget="./DoubExpSynA"/>

    <poissonFiringSynapse id="362882" averageRate="20.0 per_s" synapse="DoubExpSynA" spikeTarget="./DoubExpSynA"/>

    <poissonFiringSynapse id="331514" averageRate="20.0 per_s" synapse="DoubExpSynA" spikeTarget="./DoubExpSynA"/>

    <poissonFiringSynapse id="392665" averageRate="20.0 per_s" synapse="DoubExpSynA" spikeTarget="./DoubExpSynA"/>

    <poissonFiringSynapse id="415503" averageRate="20.0 per_s" synapse="DoubExpSynA" spikeTarget="./DoubExpSynA"/>

    <poissonFiringSynapse id="373569" averageRate="20.0 per_s" synapse="DoubExpSynA" spikeTarget="./DoubExpSynA"/>

    <poissonFiringSynapse id="332879" averageRate="20.0 per_s" synapse="DoubExpSynA" spikeTarget="./DoubExpSynA"/>

    <poissonFiringSynapse id="337396" averageRate="20.0 per_s" synapse="DoubExpSynA" spikeTarget="./DoubExpSynA"/>

    <poissonFiringSynapse id="317572" averageRate="20.0 per_s" synapse="DoubExpSynA" spikeTarget="./DoubExpSynA"/>

    <poissonFiringSynapse id="331413" averageRate="20.0 per_s" synapse="DoubExpSynA" spikeTarget="./DoubExpSynA"/>

    <poissonFiringSynapse id="591293" averageRate="20.0 per_s" synapse="DoubExpSynA" spikeTarget="./DoubExpSynA"/>

    <poissonFiringSynapse id="401197" averageRate="20.0 per_s" synapse="DoubExpSynA" spikeTarget="./DoubExpSynA"/>

    <network id="network_PN2RS" type="networkWithTemperature" temperature="6.3 degC">

        <population id="neuron_PN2_RS_sk_480245" component="neuron_PN2_RS_sk_480245" type="populationList" size="1">
            <instance id="0">
                <location x="0.0" y="0.0" z="0.0"/>
            </instance>
        </population>

            <!--There are no synaptic connections present in the network-->

        <inputList id="398576" component="398576" population="neuron_PN2_RS_sk_480245">
            <input id="0" target="../neuron_PN2_RS_sk_480245/0/neuron_PN2_RS_sk_480245" destination="synapses" segmentId="15013"/>
            <input id="1" target="../neuron_PN2_RS_sk_480245/0/neuron_PN2_RS_sk_480245" destination="synapses" segmentId="23265"/>
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        </inputList>

        <inputList id="395984" component="395984" population="neuron_PN2_RS_sk_480245">
            <input id="0" target="../neuron_PN2_RS_sk_480245/0/neuron_PN2_RS_sk_480245" destination="synapses" segmentId="8979"/>
            <input id="1" target="../neuron_PN2_RS_sk_480245/0/neuron_PN2_RS_sk_480245" destination="synapses" segmentId="11890"/>
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        </inputList>

        <inputList id="321092" component="321092" population="neuron_PN2_RS_sk_480245">
            <input id="0" target="../neuron_PN2_RS_sk_480245/0/neuron_PN2_RS_sk_480245" destination="synapses" segmentId="24919"/>
            <input id="1" target="../neuron_PN2_RS_sk_480245/0/neuron_PN2_RS_sk_480245" destination="synapses" segmentId="16547"/>
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        </inputList>

        <inputList id="538882" component="538882" population="neuron_PN2_RS_sk_480245">
            <input id="0" target="../neuron_PN2_RS_sk_480245/0/neuron_PN2_RS_sk_480245" destination="synapses" segmentId="16983"/>
            <input id="1" target="../neuron_PN2_RS_sk_480245/0/neuron_PN2_RS_sk_480245" destination="synapses" segmentId="13138"/>
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        </inputList>

        <inputList id="403794" component="403794" population="neuron_PN2_RS_sk_480245">
            <input id="0" target="../neuron_PN2_RS_sk_480245/0/neuron_PN2_RS_sk_480245" destination="synapses" segmentId="7999"/>
            <input id="1" target="../neuron_PN2_RS_sk_480245/0/neuron_PN2_RS_sk_480245" destination="synapses" segmentId="16732"/>
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        </inputList>

        <inputList id="333916" component="333916" population="neuron_PN2_RS_sk_480245">
            <input id="0" target="../neuron_PN2_RS_sk_480245/0/neuron_PN2_RS_sk_480245" destination="synapses" segmentId="16103"/>
            <input id="1" target="../neuron_PN2_RS_sk_480245/0/neuron_PN2_RS_sk_480245" destination="synapses" segmentId="5854"/>
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        </inputList>

        <inputList id="339573" component="339573" population="neuron_PN2_RS_sk_480245">
            <input id="0" target="../neuron_PN2_RS_sk_480245/0/neuron_PN2_RS_sk_480245" destination="synapses" segmentId="15019"/>
            <input id="1" target="../neuron_PN2_RS_sk_480245/0/neuron_PN2_RS_sk_480245" destination="synapses" segmentId="14038"/>
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        </inputList>

        <inputList id="225960" component="225960" population="neuron_PN2_RS_sk_480245">
            <input id="0" target="../neuron_PN2_RS_sk_480245/0/neuron_PN2_RS_sk_480245" destination="synapses" segmentId="24954"/>
            <input id="1" target="../neuron_PN2_RS_sk_480245/0/neuron_PN2_RS_sk_480245" destination="synapses" segmentId="4757"/>
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        </inputList>

        <inputList id="319492" component="319492" population="neuron_PN2_RS_sk_480245">
            <input id="0" target="../neuron_PN2_RS_sk_480245/0/neuron_PN2_RS_sk_480245" destination="synapses" segmentId="11918"/>
            <input id="1" target="../neuron_PN2_RS_sk_480245/0/neuron_PN2_RS_sk_480245" destination="synapses" segmentId="23827"/>
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        </inputList>

        <inputList id="153798" component="153798" population="neuron_PN2_RS_sk_480245">
            <input id="0" target="../neuron_PN2_RS_sk_480245/0/neuron_PN2_RS_sk_480245" destination="synapses" segmentId="19823"/>
            <input id="1" target="../neuron_PN2_RS_sk_480245/0/neuron_PN2_RS_sk_480245" destination="synapses" segmentId="13696"/>
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        </inputList>

        <inputList id="265283" component="265283" population="neuron_PN2_RS_sk_480245">
            <input id="0" target="../neuron_PN2_RS_sk_480245/0/neuron_PN2_RS_sk_480245" destination="synapses" segmentId="15945"/>
            <input id="1" target="../neuron_PN2_RS_sk_480245/0/neuron_PN2_RS_sk_480245" destination="synapses" segmentId="6202"/>
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        </inputList>

        <inputList id="360361" component="360361" population="neuron_PN2_RS_sk_480245">
            <input id="0" target="../neuron_PN2_RS_sk_480245/0/neuron_PN2_RS_sk_480245" destination="synapses" segmentId="18460"/>
            <input id="1" target="../neuron_PN2_RS_sk_480245/0/neuron_PN2_RS_sk_480245" destination="synapses" segmentId="18526"/>
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        </inputList>

        <inputList id="320688" component="320688" population="neuron_PN2_RS_sk_480245">
            <input id="0" target="../neuron_PN2_RS_sk_480245/0/neuron_PN2_RS_sk_480245" destination="synapses" segmentId="22562"/>
            <input id="1" target="../neuron_PN2_RS_sk_480245/0/neuron_PN2_RS_sk_480245" destination="synapses" segmentId="12094"/>
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        </inputList>

        <inputList id="402811" component="402811" population="neuron_PN2_RS_sk_480245">
            <input id="0" target="../neuron_PN2_RS_sk_480245/0/neuron_PN2_RS_sk_480245" destination="synapses" segmentId="26039"/>
            <input id="1" target="../neuron_PN2_RS_sk_480245/0/neuron_PN2_RS_sk_480245" destination="synapses" segmentId="25634"/>
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        </inputList>

        <inputList id="360235" component="360235" population="neuron_PN2_RS_sk_480245">
            <input id="0" target="../neuron_PN2_RS_sk_480245/0/neuron_PN2_RS_sk_480245" destination="synapses" segmentId="18064"/>
            <input id="1" target="../neuron_PN2_RS_sk_480245/0/neuron_PN2_RS_sk_480245" destination="synapses" segmentId="8506"/>
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        </inputList>

        <inputList id="445335" component="445335" population="neuron_PN2_RS_sk_480245">
            <input id="0" target="../neuron_PN2_RS_sk_480245/0/neuron_PN2_RS_sk_480245" destination="synapses" segmentId="9556"/>
            <input id="1" target="../neuron_PN2_RS_sk_480245/0/neuron_PN2_RS_sk_480245" destination="synapses" segmentId="7637"/>
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        </inputList>

        <inputList id="362999" component="362999" population="neuron_PN2_RS_sk_480245">
            <input id="0" target="../neuron_PN2_RS_sk_480245/0/neuron_PN2_RS_sk_480245" destination="synapses" segmentId="15137"/>
            <input id="1" target="../neuron_PN2_RS_sk_480245/0/neuron_PN2_RS_sk_480245" destination="synapses" segmentId="6788"/>
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        </inputList>

        <inputList id="309595" component="309595" population="neuron_PN2_RS_sk_480245">
            <input id="0" target="../neuron_PN2_RS_sk_480245/0/neuron_PN2_RS_sk_480245" destination="synapses" segmentId="20212"/>
            <input id="1" target="../neuron_PN2_RS_sk_480245/0/neuron_PN2_RS_sk_480245" destination="synapses" segmentId="18481"/>
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        </inputList>

        <inputList id="331430" component="331430" population="neuron_PN2_RS_sk_480245">
            <input id="0" target="../neuron_PN2_RS_sk_480245/0/neuron_PN2_RS_sk_480245" destination="synapses" segmentId="15255"/>
            <input id="1" target="../neuron_PN2_RS_sk_480245/0/neuron_PN2_RS_sk_480245" destination="synapses" segmentId="8678"/>
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        </inputList>

        <inputList id="329095" component="329095" population="neuron_PN2_RS_sk_480245">
            <input id="0" target="../neuron_PN2_RS_sk_480245/0/neuron_PN2_RS_sk_480245" destination="synapses" segmentId="6889"/>
            <input id="1" target="../neuron_PN2_RS_sk_480245/0/neuron_PN2_RS_sk_480245" destination="synapses" segmentId="20545"/>
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        </inputList>

        <inputList id="343030" component="343030" population="neuron_PN2_RS_sk_480245">
            <input id="0" target="../neuron_PN2_RS_sk_480245/0/neuron_PN2_RS_sk_480245" destination="synapses" segmentId="15660"/>
            <input id="1" target="../neuron_PN2_RS_sk_480245/0/neuron_PN2_RS_sk_480245" destination="synapses" segmentId="16663"/>
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        </inputList>

        <inputList id="220151" component="220151" population="neuron_PN2_RS_sk_480245">
            <input id="0" target="../neuron_PN2_RS_sk_480245/0/neuron_PN2_RS_sk_480245" destination="synapses" segmentId="24434"/>
            <input id="1" target="../neuron_PN2_RS_sk_480245/0/neuron_PN2_RS_sk_480245" destination="synapses" segmentId="21334"/>
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        </inputList>

        <inputList id="392106" component="392106" population="neuron_PN2_RS_sk_480245">
            <input id="0" target="../neuron_PN2_RS_sk_480245/0/neuron_PN2_RS_sk_480245" destination="synapses" segmentId="24184"/>
            <input id="1" target="../neuron_PN2_RS_sk_480245/0/neuron_PN2_RS_sk_480245" destination="synapses" segmentId="18062"/>
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        </inputList>

        <inputList id="332797" component="332797" population="neuron_PN2_RS_sk_480245">
            <input id="0" target="../neuron_PN2_RS_sk_480245/0/neuron_PN2_RS_sk_480245" destination="synapses" segmentId="24502"/>
            <input id="1" target="../neuron_PN2_RS_sk_480245/0/neuron_PN2_RS_sk_480245" destination="synapses" segmentId="19725"/>
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        </inputList>

        <inputList id="396156" component="396156" population="neuron_PN2_RS_sk_480245">
            <input id="0" target="../neuron_PN2_RS_sk_480245/0/neuron_PN2_RS_sk_480245" destination="synapses" segmentId="17997"/>
            <input id="1" target="../neuron_PN2_RS_sk_480245/0/neuron_PN2_RS_sk_480245" destination="synapses" segmentId="9716"/>
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        </inputList>

        <inputList id="596799" component="596799" population="neuron_PN2_RS_sk_480245">
            <input id="0" target="../neuron_PN2_RS_sk_480245/0/neuron_PN2_RS_sk_480245" destination="synapses" segmentId="17886"/>
            <input id="1" target="../neuron_PN2_RS_sk_480245/0/neuron_PN2_RS_sk_480245" destination="synapses" segmentId="16210"/>
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        </inputList>

        <inputList id="401986" component="401986" population="neuron_PN2_RS_sk_480245">
            <input id="0" target="../neuron_PN2_RS_sk_480245/0/neuron_PN2_RS_sk_480245" destination="synapses" segmentId="13341"/>
            <input id="1" target="../neuron_PN2_RS_sk_480245/0/neuron_PN2_RS_sk_480245" destination="synapses" segmentId="19895"/>
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        </inputList>

        <inputList id="333138" component="333138" population="neuron_PN2_RS_sk_480245">
            <input id="0" target="../neuron_PN2_RS_sk_480245/0/neuron_PN2_RS_sk_480245" destination="synapses" segmentId="16945"/>
            <input id="1" target="../neuron_PN2_RS_sk_480245/0/neuron_PN2_RS_sk_480245" destination="synapses" segmentId="15110"/>
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        </inputList>

        <inputList id="337765" component="337765" population="neuron_PN2_RS_sk_480245">
            <input id="0" target="../neuron_PN2_RS_sk_480245/0/neuron_PN2_RS_sk_480245" destination="synapses" segmentId="25758"/>
            <input id="1" target="../neuron_PN2_RS_sk_480245/0/neuron_PN2_RS_sk_480245" destination="synapses" segmentId="18574"/>
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        </inputList>

        <inputList id="373935" component="373935" population="neuron_PN2_RS_sk_480245">
            <input id="0" target="../neuron_PN2_RS_sk_480245/0/neuron_PN2_RS_sk_480245" destination="synapses" segmentId="18610"/>
            <input id="1" target="../neuron_PN2_RS_sk_480245/0/neuron_PN2_RS_sk_480245" destination="synapses" segmentId="16231"/>
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        </inputList>

        <inputList id="379686" component="379686" population="neuron_PN2_RS_sk_480245">
            <input id="0" target="../neuron_PN2_RS_sk_480245/0/neuron_PN2_RS_sk_480245" destination="synapses" segmentId="8415"/>
            <input id="1" target="../neuron_PN2_RS_sk_480245/0/neuron_PN2_RS_sk_480245" destination="synapses" segmentId="22727"/>
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        </inputList>

        <inputList id="379044" component="379044" population="neuron_PN2_RS_sk_480245">
            <input id="0" target="../neuron_PN2_RS_sk_480245/0/neuron_PN2_RS_sk_480245" destination="synapses" segmentId="15538"/>
            <input id="1" target="../neuron_PN2_RS_sk_480245/0/neuron_PN2_RS_sk_480245" destination="synapses" segmentId="15165"/>
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        </inputList>

        <inputList id="499879" component="499879" population="neuron_PN2_RS_sk_480245">
            <input id="0" target="../neuron_PN2_RS_sk_480245/0/neuron_PN2_RS_sk_480245" destination="synapses" segmentId="15009"/>
            <input id="1" target="../neuron_PN2_RS_sk_480245/0/neuron_PN2_RS_sk_480245" destination="synapses" segmentId="21238"/>
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        </inputList>

        <inputList id="362954" component="362954" population="neuron_PN2_RS_sk_480245">
            <input id="0" target="../neuron_PN2_RS_sk_480245/0/neuron_PN2_RS_sk_480245" destination="synapses" segmentId="17223"/>
            <input id="1" target="../neuron_PN2_RS_sk_480245/0/neuron_PN2_RS_sk_480245" destination="synapses" segmentId="5158"/>
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        </inputList>

        <inputList id="373736" component="373736" population="neuron_PN2_RS_sk_480245">
            <input id="0" target="../neuron_PN2_RS_sk_480245/0/neuron_PN2_RS_sk_480245" destination="synapses" segmentId="12346"/>
            <input id="1" target="../neuron_PN2_RS_sk_480245/0/neuron_PN2_RS_sk_480245" destination="synapses" segmentId="17102"/>
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        </inputList>

        <inputList id="404952" component="404952" population="neuron_PN2_RS_sk_480245">
            <input id="0" target="../neuron_PN2_RS_sk_480245/0/neuron_PN2_RS_sk_480245" destination="synapses" segmentId="6813"/>
            <input id="1" target="../neuron_PN2_RS_sk_480245/0/neuron_PN2_RS_sk_480245" destination="synapses" segmentId="5405"/>
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        </inputList>

        <inputList id="328875" component="328875" population="neuron_PN2_RS_sk_480245">
            <input id="0" target="../neuron_PN2_RS_sk_480245/0/neuron_PN2_RS_sk_480245" destination="synapses" segmentId="12007"/>
            <input id="1" target="../neuron_PN2_RS_sk_480245/0/neuron_PN2_RS_sk_480245" destination="synapses" segmentId="13846"/>
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        </inputList>

        <inputList id="362982" component="362982" population="neuron_PN2_RS_sk_480245">
            <input id="0" target="../neuron_PN2_RS_sk_480245/0/neuron_PN2_RS_sk_480245" destination="synapses" segmentId="21645"/>
            <input id="1" target="../neuron_PN2_RS_sk_480245/0/neuron_PN2_RS_sk_480245" destination="synapses" segmentId="14268"/>
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        </inputList>

        <inputList id="366040" component="366040" population="neuron_PN2_RS_sk_480245">
            <input id="0" target="../neuron_PN2_RS_sk_480245/0/neuron_PN2_RS_sk_480245" destination="synapses" segmentId="20859"/>
            <input id="1" target="../neuron_PN2_RS_sk_480245/0/neuron_PN2_RS_sk_480245" destination="synapses" segmentId="10293"/>
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        </inputList>

        <inputList id="420141" component="420141" population="neuron_PN2_RS_sk_480245">
            <input id="0" target="../neuron_PN2_RS_sk_480245/0/neuron_PN2_RS_sk_480245" destination="synapses" segmentId="8377"/>
            <input id="1" target="../neuron_PN2_RS_sk_480245/0/neuron_PN2_RS_sk_480245" destination="synapses" segmentId="23602"/>
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        </inputList>

        <inputList id="327347" component="327347" population="neuron_PN2_RS_sk_480245">
            <input id="0" target="../neuron_PN2_RS_sk_480245/0/neuron_PN2_RS_sk_480245" destination="synapses" segmentId="16659"/>
            <input id="1" target="../neuron_PN2_RS_sk_480245/0/neuron_PN2_RS_sk_480245" destination="synapses" segmentId="12592"/>
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        </inputList>

        <inputList id="492811" component="492811" population="neuron_PN2_RS_sk_480245">
            <input id="0" target="../neuron_PN2_RS_sk_480245/0/neuron_PN2_RS_sk_480245" destination="synapses" segmentId="17979"/>
            <input id="1" target="../neuron_PN2_RS_sk_480245/0/neuron_PN2_RS_sk_480245" destination="synapses" segmentId="20492"/>
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        </inputList>

        <inputList id="362882" component="362882" population="neuron_PN2_RS_sk_480245">
            <input id="0" target="../neuron_PN2_RS_sk_480245/0/neuron_PN2_RS_sk_480245" destination="synapses" segmentId="21047"/>
            <input id="1" target="../neuron_PN2_RS_sk_480245/0/neuron_PN2_RS_sk_480245" destination="synapses" segmentId="9613"/>
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        </inputList>

        <inputList id="331514" component="331514" population="neuron_PN2_RS_sk_480245">
            <input id="0" target="../neuron_PN2_RS_sk_480245/0/neuron_PN2_RS_sk_480245" destination="synapses" segmentId="24181"/>
            <input id="1" target="../neuron_PN2_RS_sk_480245/0/neuron_PN2_RS_sk_480245" destination="synapses" segmentId="24179"/>
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        </inputList>

        <inputList id="392665" component="392665" population="neuron_PN2_RS_sk_480245">
            <input id="0" target="../neuron_PN2_RS_sk_480245/0/neuron_PN2_RS_sk_480245" destination="synapses" segmentId="18417"/>
            <input id="1" target="../neuron_PN2_RS_sk_480245/0/neuron_PN2_RS_sk_480245" destination="synapses" segmentId="4765"/>
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        </inputList>

        <inputList id="415503" component="415503" population="neuron_PN2_RS_sk_480245">
            <input id="0" target="../neuron_PN2_RS_sk_480245/0/neuron_PN2_RS_sk_480245" destination="synapses" segmentId="14058"/>
            <input id="1" target="../neuron_PN2_RS_sk_480245/0/neuron_PN2_RS_sk_480245" destination="synapses" segmentId="23502"/>
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        </inputList>

        <inputList id="373569" component="373569" population="neuron_PN2_RS_sk_480245">
            <input id="0" target="../neuron_PN2_RS_sk_480245/0/neuron_PN2_RS_sk_480245" destination="synapses" segmentId="14295"/>
            <input id="1" target="../neuron_PN2_RS_sk_480245/0/neuron_PN2_RS_sk_480245" destination="synapses" segmentId="19245"/>
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        </inputList>

        <inputList id="332879" component="332879" population="neuron_PN2_RS_sk_480245">
            <input id="0" target="../neuron_PN2_RS_sk_480245/0/neuron_PN2_RS_sk_480245" destination="synapses" segmentId="15371"/>
            <input id="1" target="../neuron_PN2_RS_sk_480245/0/neuron_PN2_RS_sk_480245" destination="synapses" segmentId="13215"/>
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        </inputList>

        <inputList id="337396" component="337396" population="neuron_PN2_RS_sk_480245">
            <input id="0" target="../neuron_PN2_RS_sk_480245/0/neuron_PN2_RS_sk_480245" destination="synapses" segmentId="12912"/>
            <input id="1" target="../neuron_PN2_RS_sk_480245/0/neuron_PN2_RS_sk_480245" destination="synapses" segmentId="15278"/>
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        </inputList>

        <inputList id="317572" component="317572" population="neuron_PN2_RS_sk_480245">
            <input id="0" target="../neuron_PN2_RS_sk_480245/0/neuron_PN2_RS_sk_480245" destination="synapses" segmentId="18184"/>
            <input id="1" target="../neuron_PN2_RS_sk_480245/0/neuron_PN2_RS_sk_480245" destination="synapses" segmentId="12578"/>
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        </inputList>

        <inputList id="331413" component="331413" population="neuron_PN2_RS_sk_480245">
            <input id="0" target="../neuron_PN2_RS_sk_480245/0/neuron_PN2_RS_sk_480245" destination="synapses" segmentId="17893"/>
            <input id="1" target="../neuron_PN2_RS_sk_480245/0/neuron_PN2_RS_sk_480245" destination="synapses" segmentId="14902"/>
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        </inputList>

        <inputList id="591293" component="591293" population="neuron_PN2_RS_sk_480245">
            <input id="0" target="../neuron_PN2_RS_sk_480245/0/neuron_PN2_RS_sk_480245" destination="synapses" segmentId="24440"/>
            <input id="1" target="../neuron_PN2_RS_sk_480245/0/neuron_PN2_RS_sk_480245" destination="synapses" segmentId="20757"/>
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        </inputList>

        <inputList id="401197" component="401197" population="neuron_PN2_RS_sk_480245">
            <input id="0" target="../neuron_PN2_RS_sk_480245/0/neuron_PN2_RS_sk_480245" destination="synapses" segmentId="19460"/>
            <input id="1" target="../neuron_PN2_RS_sk_480245/0/neuron_PN2_RS_sk_480245" destination="synapses" segmentId="17773"/>
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        </inputList>

    </network>

</neuroml>
